z := 500
a := canvas(z, z, "#b2fa35")
a := addbuffer(a)
a := moveto(29, 29, a)
a := lineto(2, 20, a)
a := setstrokecolour("yellow", a)
a := setwidth(5, a)
a :=
    for i ∈ 0 .. 50
        a ← lineto(round(rnd(z)), round(rnd(z)), a)
    a
a := stroke(a)
# [component: inputs a]
rnd(z) = 425.61
a := rmbuffer(a)
# [component: inputs a]
